# OpenSim document version 40000
AnalyzeTool Moco:
  model_file: ..\..\OpenSim\In\Models\RTSA_Adjusted\FSModel_GHJoint_J40xoh155cm_dummyCoord.osim
  replace_force_set: false
  results_directory: ..\..\OpenSim\Out\Moco\Analysis\sim_J40xoh155cm\
  output_precision: 8
  initial_time: 0
  final_time: 1.528889
  solve_for_equilibrium_for_auxiliary_states: true
  maximum_number_of_integrator_steps: 20000
  maximum_integrator_step_size: 1
  minimum_integrator_step_size: 1e-8
  integrator_error_tolerance: 1e-5
  states_file: ../../OpenSim/Out/Moco/Analysis/paper_v02/Final/sim_J40xoh155cm/MocoSol_LateralReach.sto
  lowpass_cutoff_frequency_for_coordinates: -1
  AnalysisSet Analyses:
    JointReaction: start_time=0 end_time=0.934 step_interval=1 in_degrees=true joint_names=shoulder0
        apply_on_bodies=parent express_in_frame=/bodyset/scapula/glenoid_centre/
    ForceReporter: start_time=0 end_time=0.934 step_interval=1 in_degrees=true include_constraint_forces=false
    MuscleAnalysis: start_time=0 end_time=0.934 step_interval=1 in_degrees=true muscle_list=(DELT1 DELT2 DELT3)
        moment_arm_coordinate_list=dummy_coord compute_moments=true
